// COMSOL Multiphysics 6.1.0.252 model "Stationary.mph"
// Outline of the model tree

Parameters
  omega = 0.25*pi[rad/s]

Geometry
  geom1 "Geometry 1" (2D axisymmetric, length unit m)
    r1: Rectangle | size = {0.02, 0.04}
    r2: Rectangle | pos = {0, 0.014}; size = {0.008, 0.003}
    r3: Rectangle | pos = {0, 0.017}; size = {0.001, 0.023}
    co1: Compose | input = r1, r2, r3; formula = r1-r2-r3
    fin: Finalize "Form Union"

Materials
  mat1: Common "Material 1" on all domains
    def "Basic"
      density = 1e3
      dynamicviscosity = 1e-3

Physics
  spf: LaminarFlow on all domains
    dependent variable u = {u, v, w}
    ShapeProperty.order_fluid = 2
    PhysicalModelProperty.SwirlFlow = 1
    fp1: FluidProperties (default)
    init1: init "Initial Values 1" (default)
    axi1: AxialSymmetry (default)
    wallbc1: WallBC "Wall 1" (default)
    wallbc2: WallBC "Wall 2" on boundaries 3, 5, 7 | uvw = r*omega; SlidingWall = 1
    sym1: Symmetry on boundaries 6
    prpc1: PressurePointConstraint on points 8

Mesh
  mesh1 "Mesh 1" (physics-controlled)
    size: MeshSizeDefault | table = cfd; hauto = 6

Studies
  std1 "Study 1"
    stat: Stationary | useparam = on; pname = omega; plistarr = 0.25*pi 0.5*pi 2*pi 4*pi; punit = rad/s

Solver configurations
  sol1 "Solution 1" (study std1)
    v1: Variables "Dependent Variables 1"
    s1: Stationary "Stationary Solver 1"
      p1: Parametric
      fc1: FullyCoupled | linsolver = d1; initstep = 0.01; maxiter = 100
      d1: Direct "Direct, fluid flow variables (spf)" | linsolver = pardiso; pivotperturb = 1.0E-13

Datasets
  dset1: Solution | solution = sol1
  rev1: Revolve2D "Revolution 2D" | data = dset1; startangle = -90; revangle = 225

Plots
  pg1: PlotGroup2D "Velocity (spf)" | data = dset1; dataisaxisym = on
    surf1: Surface | expr = spf.U
    str1: Streamline on boundaries 3, 5, 7 | expr = {u, w}; udist = 0.03
  pg2: PlotGroup2D "Pressure (spf)" | data = dset1; dataisaxisym = on
    con1: Contour | expr = p; levelrounding = off
  pg3: PlotGroup3D "Velocity, 3D (spf)" | data = rev1
    surf1: Surface (disabled) | expr = spf.U
    str1: Streamline | revcoordsys = cylindrical; expr = {u, v, w}